# Расчет измеряемого значения для датчика SCT-013-030
# Входные данные:
# Характеристики датчика:
Usens_max := 1  # V, максимальное выходное напряжение
Isens_max := 30  # A, максимальный измеряемый ток
Rsens := 62  # Ohm, значение встроенного сопротивления
Nsens := 1800  # шт, количество витков в обмотке
X := 1.85  # калибровочный коэффициент
# Характеристики сети:
Unet := 226  # V, напряжение сети
# Характеристики нагрузки:
Pdev := 1600  # W, потребляемая мощность
# Измеренные значения:
Umes := 90.3*10^-3  # V, напряжение на выходе датчика
# Расчеты:
# Расчет отношения "напряжение-ток" для датчика:
K := Usens_max/Isens_max = 0.0333333
# Расчет потребляемого нагрузкой тока, исходя из паспортных данных:
Idev := Pdev/Unet = 7.07965  # A, ток нагрузки
# Расчет среднего квадратичного значения тока нагрузки, исходя из имеющихся данных измерений:
Imes_rms := Umes*Isens_max = 2.709  # A, RMS значение тока нагрузки
# или
Imes_rms := Umes/K = 2.709  # A, RMS значение тока нагрузки
# Расчет потребляемого тока нагрузки, исходя из имеющихся данных измерений:
Imes := Imes_rms*X*sqrt(2) = 7.08754  # A, ток нагрузки
# Расчет погрешности измеренного значения тока нагрузки относительно полученного значения на основе рассчета по паспортным данным:
ΔI := |Idev - Imes| = 0.00789738  # A, погрешность измерения
ΔIpercent := ΔI/Idev*100 = 0.111551  # %, погрешность измерения
# Расчет потребляемой мощности нагрузкой, исходя из имеющихся данных измерений:
Pmes := Imes*Unet = 1601.78  # W, потребляемая мощность
# Расчет погрешности измеренного значения потребляемой мощности нагрузки относительно полученного значения на основе рассчета по паспортным данным:
ΔP := |Pdev - Pmes| = 1.78481  # P, погрешность измерения
ΔPpercent := ΔP/Pdev*100 = 0.111551  # %, погрешность измерения
